// COMSOL Multiphysics 6.2.0.339 model "pinn_magnetic_coil_model.mph"
// Outline of the model tree

Geometry
  geom1 "Geometry 1" (2D, length unit m)
    rect1: Rectangle "Left Coil" | pos = {-7, -5}; size = {2, 10}
    rect2: Rectangle "Right Coil" | pos = {5, -5}; size = {2, 10}
    rect3: Rectangle "Magnetic Core" | pos = {-7, -7}; size = {14, 2}
    rect4: Rectangle "Air Domain" | pos = {-35, -35}; size = {70, 70}
    dif1: Difference "Air" | input = rect4; input2 = rect1, rect2, rect3
    fin: Finalize "Form Union"

Materials
  mat_copper_l: Common "Copper Left" on domains 0
    def "Basic"
      relpermeability = 1
      electricconductivity = 5.8e7[S/m]
  mat_copper_r: Common "Copper Right" on domains 1
    def "Basic"
      relpermeability = 1
      electricconductivity = 5.8e7[S/m]
  mat_iron: Common "Soft Iron" on no domains
    def "Basic"
      relpermeability = 1000

Physics
  mf: InductionCurrents "Magnetic Fields" on all domains
    dependent variable A = {Ax, Ay, Az}
    fsp1: FreeSpace (default)
    mi1: MagneticInsulation (default)
    init1: init "Initial Values 1" (default)
    coil_l: Coil "Left Coil Domain" on domains 0 | ICoil = 1[A]; N = 300
    coil_r: Coil "Right Coil Domain" on domains 1 | ICoil = -1[A]; N = 300

Mesh
  mesh1 "Mesh 1" (physics-controlled)
    size: MeshSizeDefault | hauto = 3

Studies
  std1 "Study 1"
    stat: Stationary

Solver configurations
  sol1 "Solution 1" (study std1)
    v1: Variables "Dependent Variables 1"
    s1: Stationary "Stationary Solver 1"
      dDef: Direct
      fc1: FullyCoupled

Datasets
  dset1: Solution | solution = sol1

Plots
  psurf_B: PlotGroup2D "Magnetic Flux Density |B|" | data = dset1
    surf_B: Surface | expr = mf.normB